# OpenSim document version 40000
InverseKinematicsTool InverseKinematics:
  model_file: Rajagopal2016_scaled.osim
  marker_file: training_motion.trc
  output_motion_file: training_motion_ik.mot
  time_range: 0 8.742067
  IKTaskSet:
    IKMarkerTask RHJC: apply=true weight=30
    IKMarkerTask RKJC: apply=true weight=40
    IKMarkerTask RAJC: apply=true weight=40
    IKMarkerTask RCAL: apply=true weight=100
    IKMarkerTask RTOE: apply=true weight=100
    IKMarkerTask LHJC: apply=true weight=30
    IKMarkerTask LKJC: apply=true weight=40
    IKMarkerTask LAJC: apply=true weight=40
    IKMarkerTask LCAL: apply=true weight=100
    IKMarkerTask LTOE: apply=true weight=100
    IKMarkerTask RSJC: apply=true weight=10
    IKMarkerTask REJC: apply=true weight=10
    IKMarkerTask RFAsuperior: apply=true weight=10
    IKMarkerTask LSJC: apply=true weight=10
    IKMarkerTask LEJC: apply=true weight=10
    IKMarkerTask LFAsuperior: apply=true weight=10
    IKMarkerTask CLAV: apply=true weight=5
    IKMarkerTask C7: apply=true weight=25
