# OpenSim document version 40000
ScaleTool Scaling:
  model_file: Rajagopal2016.osim
  output_model_file: Rajagopal2016_scaled.osim
  subject_mass: 65
  ScaleTool.Scale_Applications:
    ScaleApplication subject_scale: apply=true time_range=(0 0)
      SegmentScaleSet:
        SegmentScale femur_r: scales=(0.9402 0.9402 0.9402)
        SegmentScale femur_l: scales=(0.9746 0.9746 0.9746)
        SegmentScale torso: scales=(0.8928 0.8928 0.8928)
        SegmentScale humerus_r: scales=(0.8675 0.8675 0.8675)
        SegmentScale humerus_l: scales=(0.9001 0.9001 0.9001)
        SegmentScale ulna_r: scales=(0.9964 0.9964 0.9964)
        SegmentScale ulna_l: scales=(1.0114 1.0114 1.0114)
        SegmentScale pelvis: scales=(0.9404 0.9404 0.9404)
        SegmentScale tibia_r: scales=(0.9404 0.9404 0.9404)
        SegmentScale tibia_l: scales=(0.9404 0.9404 0.9404)
        SegmentScale radius_r: scales=(0.9964 0.9964 0.9964)
        SegmentScale radius_l: scales=(1.0114 1.0114 1.0114)
        SegmentScale calcn_r: scales=(0.9404 0.9404 0.9404)
        SegmentScale calcn_l: scales=(0.9404 0.9404 0.9404)
        SegmentScale talus_r: scales=(0.9404 0.9404 0.9404)
        SegmentScale talus_l: scales=(0.9404 0.9404 0.9404)
  ScaleTool.Marker_Placement: apply=false
